<Lems xmlns="http://www.neuroml.org/lems/0.7.2" xmlns:xsi="http://www.w3.org/2001/XMLSchema-instance" xsi:schemaLocation="http://www.neuroml.org/lems/0.7.2  https://raw.github.com/LEMS/LEMS/development/Schemas/LEMS/LEMS_v0.7.2.xsd">

    <Target component="sim1" reportFile="simulator.props" timesFile="time.dat"/>

        <!--Include standard NeuroML 2 ComponentType definitions-->

    <Include file="Cells.xml"/>
    <Include file="Networks.xml"/>
    <Include file="Simulation.xml"/>

        <!--Include the generated NeuroML 2 files-->

        <!--   Channel/synapse files-->
    <Include file="Ca_HVA.channel.nml"/>
    <Include file="Ca_LVAst.channel.nml"/>
    <Include file="CaDynamics_E2_NML2.nml"/>
    <Include file="CaDynamics_E2_NML2__decay122__gamma5_09Emin4.nml"/>
    <Include file="CaDynamics_E2_NML2__decay460__gamma5_01Emin4.nml"/>
    <Include file="Ih.channel.nml"/>
    <Include file="Im.channel.nml"/>
    <Include file="K_Pst.channel.nml"/>
    <Include file="K_Tst.channel.nml"/>
    <Include file="Nap_Et2.channel.nml"/>
    <Include file="NaTa_t.channel.nml"/>
    <Include file="pas.channel.nml"/>
    <Include file="SK_E2.channel.nml"/>
    <Include file="SKv3_1.channel.nml"/>
        <!--   Cell files-->
    <Include file="L5PC.cell.nml"/>
        <!--   Network file-->
    <Include file="TestL5PC.net.nml"/>

        <!--Note: this could be: Simulation id="sim1" ... , but Component type="Simulation" ...
        is used to allow validation of this file according to the LEMS schema specified above...-->
        <!-- EDITED HERE: CHANGED STEP FROM 0.01 to 0.025 SO THAT EDEN RUNS AT SAME DT OTHER -->
    <Component type="Simulation" id="sim1" length="3000.0ms" step="0.025ms" target="network_L5bPyrCellHayEtAl2011">

        <Display id="CellGroup_1_v" title="L5bPyrCellHayEtAl2011: Default Simulation Configuration, CellGroup_1, VOLTAGE, VOLTAGE, VOLTAGE" xmin="-0.3" xmax="3.3000002" ymin="-0.09200001" ymax="0.052" timeScale="1s">
            <Line id="VOLTAGE" timeScale="1s" quantity="CellGroup_1/0/L5PC/0/v" scale="1 V" color="#000000"/>

            <Line id="VOLTAGE" timeScale="1s" quantity="CellGroup_1/0/L5PC/2363/v" scale="1 V" color="#ff0000"/>

            <Line id="VOLTAGE" timeScale="1s" quantity="CellGroup_1/0/L5PC/2313/v" scale="1 V" color="#0000ff"/>
        </Display>
        <!--
        <Display id="GraphWin_5" title="L5bPyrCellHayEtAl2011: Default Simulation Configuration, CellGroup_1, CaDynamics_E2_NML2:CONC:ca, CaDynamics_E2_NML2:CONC:ca, CaDynamics_E2_NML2:CONC:ca" xmin="-0.3" xmax="3.3000002" ymin="-2.5E-5" ymax="2.75E-4" timeScale="1s">
            <Line id="CaDynamics_E2_NML2_CONC_ca" timeScale="1s" quantity="CellGroup_1/0/L5PC/caConc" scale="1 mol_per_m3" color="#000000"/>

            <Line id="CaDynamics_E2_NML2_CONC_ca" timeScale="1s" quantity="CellGroup_1/0/L5PC/caConc" scale="1 mol_per_m3" color="#ff0000"/>

            <Line id="CaDynamics_E2_NML2_CONC_ca" timeScale="1s" quantity="CellGroup_1/0/L5PC/caConc" scale="1 mol_per_m3" color="#0000ff"/>
        </Display>-->

        <OutputFile id="CellGroup_1_v_OF" fileName="CellGroup_1_0.0.dat">
            <OutputColumn id="v" quantity="CellGroup_1/0/L5PC/0/v"/>
        </OutputFile>

        <OutputFile id="CellGroup_1_v_1_OF" fileName="CellGroup_1_0.2363.dat">
            <OutputColumn id="v" quantity="CellGroup_1/0/L5PC/2363/v"/>
        </OutputFile>

        <OutputFile id="CellGroup_1_v_2_OF" fileName="CellGroup_1_0.2313.dat">
            <OutputColumn id="v" quantity="CellGroup_1/0/L5PC/2313/v"/>
        </OutputFile>
        <!--
        <OutputFile id="Var_40_OF" fileName="CellGroup_1_0.CaDynamics_E2_NML2_CONC_ca.dat">
            <OutputColumn id="caConc" quantity="CellGroup_1/0/L5PC/caConc"/>
        </OutputFile>

        <OutputFile id="Var_41_OF" fileName="CellGroup_1_0.CaDynamics_E2_NML2_CONC_ca.dat">
            <OutputColumn id="caConc" quantity="CellGroup_1/0/L5PC/caConc"/>
        </OutputFile>

        <OutputFile id="Var_42_OF" fileName="CellGroup_1_0.CaDynamics_E2_NML2_CONC_ca.dat">
            <OutputColumn id="caConc" quantity="CellGroup_1/0/L5PC/caConc"/>
        </OutputFile>-->>
    </Component>

</Lems>
